x := [2, 4, 8, 6, 4, 1]
y := [4, 6, 8, 5, 3, 1]
k(x, y) := e^(x + y^2) - ln(tan(x/y) + 2)
i := 0 .. 5
j := 0 .. 5
M[i, j] := k(x[0, i], y[0, j])
M = [
    65659968, 3.18559e16, 4.60719e28, 5.32048e11, 59873.1, 21.7727 - 3.14159i;
    485165194, 2.35385e17, 3.40428e29, 3.93133e12, 442412, 147.263;
    2.64891e10 - 3.14159i, 1.28516e19, 1.85867e31, 2.14644e14 - 3.14159i, 24154952, 8101.52 - 3.14159i;
    3.58491e9, 1.73927e18, 2.51544e30, 2.90488e13, 3269019 - 3.14159i, 1096.1;
    485165194, 2.35385e17, 3.40428e29, 3.93133e12, 442412, 147.263;
    24154952, 1.17191e16, 1.69489e28, 1.9573e11, 22025.6, 6.12002
]
M1 := eigenvals(M)
M1 = [-0.938824 + 0.00778723i; 1.85867e31; 35294759 + 0.338542i; 4656.14 + 0.304844i; -2.43837 - 0.161306i; -0.482536 - 0.108804i]
