outputs := "1, 2, 3, 4, 5, 6, 7, 5, 4, 3, 1, 1, 5, 7, 5, 6, 1"
A := [
    1/3, 1/3, 0, 0, 1/3, 0, 0;
    0, 0, 1, 0, 0, 0, 0;
    1/2, 0, 0, 1/2, 0, 0, 0;
    0, 0, 1/2, 0, 1/2, 0, 0;
    0, 0, 0, 1/4, 0, 2/4, 1/4;
    1/2, 0, 0, 0, 0, 0, 1/2;
    0, 0, 0, 0, 2/2, 0, 0
]
A = [
    0.333333, 0.333333, 0, 0, 0.333333, 0, 0;
    0, 0, 1, 0, 0, 0, 0;
    0.5, 0, 0, 0.5, 0, 0, 0;
    0, 0, 0.5, 0, 0.5, 0, 0;
    0, 0, 0, 0.25, 0, 0.5, 0.25;
    0.5, 0, 0, 0, 0, 0, 0.5;
    0, 0, 0, 0, 1, 0, 0
]
A^2 = [
    0.111111, 0.111111, 0.333333, 0.0833333, 0.111111, 0.166667, 0.0833333;
    0.5, 0, 0, 0.5, 0, 0, 0;
    0.166667, 0.166667, 0.25, 0, 0.416667, 0, 0;
    0.25, 0, 0, 0.375, 0, 0.25, 0.125;
    0.25, 0, 0.125, 0, 0.375, 0, 0.25;
    0.166667, 0.166667, 0, 0, 0.666667, 0, 0;
    0, 0, 0, 0.25, 0, 0.5, 0.25
]
A^3 = [
    0.287037, 0.037037, 0.152778, 0.194444, 0.162037, 0.0555556, 0.111111;
    0.166667, 0.166667, 0.25, 0, 0.416667, 0, 0;
    0.180556, 0.0555556, 0.166667, 0.229167, 0.0555556, 0.208333, 0.104167;
    0.208333, 0.0833333, 0.1875, 0, 0.395833, 0, 0.125;
    0.145833, 0.0833333, 0, 0.15625, 0.333333, 0.1875, 0.09375;
    0.0555556, 0.0555556, 0.166667, 0.166667, 0.0555556, 0.333333, 0.166667;
    0.25, 0, 0.125, 0, 0.375, 0, 0.25
]
