outputs := "1, 2, 3, 4, 5, 6, 7, 5, 4, 3, 1, 1, 5, 7, 5, 6, 1"
# (1) 8x1 + 2x2 - 3x3 + 42x4 = 1
# (2) 13x1 + 13x2 = 4
# (3) -7x1 + 11x3 = 10
# (4) x2 + x4 = 23
# (5) 2x1+x2-7x3 = (-4)
X := [8, 2, -3, 42; 13, 13, 0, 0; -7, 0, 11, 0; 0, 1, 0, 1; 2, 1, -7, 0]
y := [1; 4; 10; 23; -4]
# w=(X^T * X)^-1 * X^T * y
X = [8, 2, -3, 42; 13, 13, 0, 0; -7, 0, 11, 0; 0, 1, 0, 1; 2, 1, -7, 0]
transpose(X) = [8, 13, -7, 0, 2; 2, 13, 0, 1, 1; -3, 0, 11, 0, -7; 42, 0, 0, 1, 0]
w := (transpose(X)*X)^-1*transpose(X)*y
w = [-3.07047; 3.45006; -0.681736; 0.40653]
X*w = [1.4558; 4.93466; 13.9942; 3.85659; 2.08127]
X*w - y = [0.455795; 0.934657; 3.99421; -19.1434; 6.08127]
