y := [1, 2, 1, 8; 4, 8, 1, 10; 7, 9, 0, 28]
S1 := [1 - 3; 4 - 5.75; 7 - 11] = [-2; -1.75; -4]
S1 = [-2; -1.75; -4]
transpose(S1) = [-2, -1.75, -4]
μ := [3; 5.75; 11]
S2 := [2 - 3; 8 - 5.75; 9 - 11] = [-1; 2.25; -2]
S2 = [-1; 2.25; -2]
transpose(S2) = [-1, 2.25, -2]
S3 := [1 - 3; 1 - 5.75; 0 - 11] = [-2; -4.75; -11]
S3 = [-2; -4.75; -11]
transpose(S3) = [-2, -4.75, -11]
S4 := [8 - 3; 10 - 5.75; 28 - 11] = [5; 4.25; 17]
S4 = [5; 4.25; 17]
transpose(S4) = [5, 4.25, 17]
S11 := S1*transpose(S1) = [4, 3.5, 8; 3.5, 3.0625, 7; 8, 7, 16]
S22 := S2*transpose(S2) = [1, -2.25, 2; -2.25, 5.0625, -4.5; 2, -4.5, 4]
S33 := S3*transpose(S3) = [4, 9.5, 22; 9.5, 22.5625, 52.25; 22, 52.25, 121]
S44 := S4*transpose(S4) = [25, 21.25, 85; 21.25, 18.0625, 72.25; 85, 72.25, 289]
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# σ =
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σ/Sum =  # error: Эта переменная не определена.
